**Non-linear Buckling
**Large displacements
**Plasticity
**Buckling with imperfection (a small internal pressure)
**Shell elements
**http://github.com/mkraska/CalculiX-Examples/tree/master/Kasten
**Created by Martin Kraska,
**Brandenburg University of Applied Sciences
**<img src="e3d40.png">

*NODE, NSET=Nall
       1,1.000000000000e+02,0.000000000000e+00,0.000000000000e+00
       2,8.333333333333e+01,0.000000000000e+00,0.000000000000e+00
       3,8.333333333333e+01,2.842170943040e-14,1.500000000000e+01
       4,1.000000000000e+02,0.000000000000e+00,1.500000000000e+01
       5,9.166666666667e+01,0.000000000000e+00,0.000000000000e+00
       6,8.333333333333e+01,1.421085471520e-14,7.500000000000e+00
       7,9.166666666667e+01,2.131628207280e-14,1.500000000000e+01
       8,1.000000000000e+02,0.000000000000e+00,7.500000000000e+00
       9,8.333333333333e+01,1.421085471520e-14,3.000000000000e+01
      10,1.000000000000e+02,0.000000000000e+00,3.000000000000e+01
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*ELEMENT, TYPE=S8R, ELSET=Eall
     1,      1,      2,      3,      4,      5,      6,      7,      8
     2,      4,      3,      9,     10,      7,     11,     12,     13
     3,     10,      9,     14,     15,     12,     16,     17,     18
     4,     15,     14,     19,     20,     17,     21,     22,     23
     5,     20,     19,     24,     25,     22,     26,     27,     28
     6,     25,     24,     29,     30,     27,     31,     32,     33
     7,     30,     29,     34,     35,     32,     36,     37,     38
     8,     35,     34,     39,     40,     37,     41,     42,     43
     9,     40,     39,     44,     45,     42,     46,     47,     48
    10,     45,     44,     49,     50,     47,     51,     52,     53
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** Names based on lower
*NSET,NSET=Nlower
1,
2,
5,
54,
56,
86,
88,
118,
120,
150,
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** Names based on upper
*NSET,NSET=Nupper
49,
50,
52,
83,
85,
115,
117,
147,
149,
179,
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*boundary
Nlower,1,6
Nupper,1,6
*MATERIAL,NAME=Steel
*ELASTIC
210000,.3
*plastic
100,0
200,0.3
300,1
*DENSITY
7.8E-9
*SHELL SECTION,ELSET=Eall,MATERIAL=Steel,offset=0
1
*STEP,nlgeom
*STATIC
*dload
** Pressure based on all
1, P, -1.000000e-02
1, EDNOR1, -1.000000e-02
231, P, -1.000000e-02
231, EDNOR1, -1.000000e-02
11, P, -1.000000e-02
11, EDNOR1, -1.000000e-02
2, P, -1.000000e-02
12, P, -1.000000e-02
232, P, -1.000000e-02
3, P, -1.000000e-02
13, P, -1.000000e-02
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*el file
S
*node file
U
*end step
*step,nlgeom
*static
0.001,1,,0.05
*boundary
Nupper,3,3, -2.000000e+01
*el file
S,PEEQ
*node file
U
*node print,totals=only,nset=Nupper
U,RF
*end step
