**Honeycomb Sandwich
**Non-linear static analysis
**Plasticity
**Penalty contact
**Symmetry reduction
**Shell elements
**http://github.com/mkraska/CalculiX-Examples/tree/master/NonLinear/Honeycomb
**Created by Martin Kraska,
**Brandenburg University of Applied Sciences
**<img src="hc.png">

*NODE, NSET=Nall
       1,7.105427357601e-15,0.000000000000e+00,-8.881784197001e-16
       2,7.105427357601e-15,1.312500000000e+00,-8.881784197001e-16
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*ELEMENT, TYPE=S4, ELSET=Eall
     2,      1,      2,      3,      4
     3,      2,      5,      6,      3
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** Names based on lower
*NSET,NSET=Nlower
3,
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*ELSET,ELSET=Elower
2,
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** Names based on upper
*NSET,NSET=Nupper
18,
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*ELSET,ELSET=Eupper
10,
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** Names based on double
*NSET,NSET=Ndouble
57,
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*ELSET,ELSET=Edouble
42,
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** Names based on single
*NSET,NSET=Nsingle
11,
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*ELSET,ELSET=Esingle
26,
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** Names based on cyl1
*NSET,NSET=Ncyl1
4410,
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*ELSET,ELSET=Ecyl1
4707,
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** Names based on cyl2
*NSET,NSET=Ncyl2
4861,
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*ELSET,ELSET=Ecyl2
5108,
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** Names based on mon1
*NSET,NSET=Nmon1
4520,
** Names based on monc
*NSET,NSET=Nmonc
1,
** Names based on xsym
*NSET,NSET=Nxsym
1,
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** surface definitions
** Surfaces based on lower
*SURFACE, NAME=Slower
2, SPOS
2, S3
2, S6
3, SPOS
3, S3
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4668, S4
** Surfaces based on upper
*SURFACE, NAME=Supper
10, SPOS
10, S3
10, S6
14, SPOS
14, S3
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4700, S5
** Surfaces based on cyl1
*SURFACE, NAME=Scyl1
4707, SPOS
4707, S3
4707, S6
4717, SPOS
4717, S3
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5106, S4
** Surfaces based on cyl2
*SURFACE, NAME=Scyl2
5108, SPOS
5108, S3
5108, S6
5118, SPOS
5118, S3
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5507, S4
**spring Element
*element,type=spring1,elset=feder
 1,1
*spring,elset=feder
 3
 1.
** constraints
*boundary
** BOUNDARY based on xsym
1, 1, ,
2, 1, ,
5, 1, ,
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497, 1, ,
** BOUNDARY based on ysym
1, 2, ,
4, 2, ,
12, 2, ,
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5301, 2, ,
**Nxsym,1,3
Ncyl1,1,3
Ncyl2,1,3
** material definition
*material, name=alu
*elastic
72000,0.3
*plastic
160,0
180,0.01
300,0.1
500,1
*density
2.7e9
** material and thickness assignment to bodies
*shell section, elset=Elower, material=alu,offset=-0.5
1
*shell section, elset=Eupper, material=alu,offset=-0.5
1
*shell section, elset=Esingle, material=alu
0.1
*shell section, elset=Edouble, material=alu
0.1
** cylinder shells
*shell section, elset=Ecyl1, material=alu, offset=0.5
1
*shell section, elset=Ecyl2, material=alu, offset=0.5
1
** contact definitions
*surface interaction, name=tool
*surface behavior, pressure-overclosure=linear
100000
***friction
**0.1,10000
*contact pair, interaction=tool, type=surface to surface
Supper,Scyl1,
*contact pair, interaction=tool, type=surface to surface
Slower,Scyl2
*step,nlgeom, inc=1000
*static
0.01,1,0.0000000001,0.01
**dload
** Edouble,P,0.01
** Esingle,P,0.01
*controls, parameters=field
** ran ,can,qa0 ,qau,rap,ea,cae,ral
   10.,0.1,100.,100.,100.
**controls, parameters=time incrementation
**15,,5
**0.25,
*boundary
Ncyl1,3,3,-5
*node file, lastiterations
U
*el file
S,PE
** *contact file
** CDIS
*node print, nset=Ncyl1, totals=only
RF
*node print, nset=Nmon1
U
*node print, nset=Nmonc
U
*end step
