**Eye/Pin Contact 2D
**Plane strain model (can be switched to plane stress)
**Linear elastic pin, elasto-plastic eye
**Node-to-surface Penalty contact
**Prescribed displacement of the pin
**http://github.com/mkraska/CalculiX-Examples/tree/master/Contact/Eyebar
**Created by Martin Kraska,
**Brandenburg University of Applied Sciences
**<img src="se.png">

*NODE, NSET=Nall
       1,2.000000000000e+01,0.000000000000e+00,0.000000000000e+00
       2,1.997590912410e+01,9.813534865484e-01,0.000000000000e+00
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*ELEMENT, TYPE=CPE4, ELSET=Eall
     1,      1,      2,      3,      4
     2,      2,      5,      6,      3
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** Names based on pin
*NSET,NSET=Npin
694,
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*ELSET,ELSET=Epin
641,
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** Names based on eye
*NSET,NSET=Neye
1,
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*ELSET,ELSET=Eeye
1,
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** Names based on fix
*NSET,NSET=Nfix
1175,
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** Names based on control
*NSET,NSET=Ncontrol
694,
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** Surfaces based on control
*SURFACE, NAME=Scontrol
** Names based on sym
*NSET,NSET=Nsym
1,
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** Names based on monitor
*NSET,NSET=Nmonitor
1114,
** Surfaces based on spin
*SURFACE, NAME=Sspin
641, S4
642, S4
643, S4
644, S4
645, S4
646, S4
647, S4
648, S4
649, S4
650, S4
651, S4
652, S4
653, S4
654, S4
655, S4
656, S4
657, S4
658, S4
659, S4
660, S4
** Surfaces based on seye
*SURFACE, NAME=Sseye
609, S3
610, S3
611, S3
612, S3
613, S3
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640, S3

*BOUNDARY
Nfix,1,1,0
Nsym,2,2,0

*MATERIAL,NAME=STEEL_el
*ELASTIC
210000,0.3
** For plane stress, the pin must be longer than the thickness of the bar, because
** otherwise the contact may fail if the bar is getting thicker than the pin
** length. The thickness value is ignored for plane strain
*SOLID SECTION, Elset=Epin, Material=STEEL_el
2
*MATERIAL,NAME=STEEL_pl
*ELASTIC
210000,0.3
*PLASTIC
235,0
235,0.02
400,0.3
500,1
*SOLID SECTION, Elset=Eeye, Material=STEEL_pl
1
*SURFACE INTERACTION, NAME=contact
*SURFACE BEHAVIOR, PRESSURE-OVERCLOSURE=LINEAR
1000000,0.1,0.01
**friction
**0.2,100000
**CONTACT PAIR, INTERACTION=contact, TYPE=SURFACE TO SURFACE
*CONTACT PAIR, INTERACTION=contact, TYPE=NODE TO SURFACE
**slave,master
Sseye,Sspin
*STEP, NLGEOM, INC=200
*STATIC
0.01,1,0.00001,0.1
*BOUNDARY
Ncontrol,1,1,2
***AMPLITUDE, NAME= FACTOR
**0,0,1,x=factor
**0,0,1,65

***DLOAD, AMPLITUDE= FACTOR
***INCLUDE,INPUT=pres.dlo

*NODE FILE,OUTPUT=2D
U
*EL FILE
S, E, PE
*CONTACT FILE
CDIS
*NODE PRINT,NSET=Ncontrol,totals=only
RF
*NODE PRINT,NSET=Nmonitor
U
*END STEP
