**Inflating a Pillow
**Non-linear static solution
**Shell elements
**Symmetry expansion in the post-processing
**http://github.com/mkraska/CalculiX-Examples/tree/master/Pillow
**Created by Martin Kraska,
**Brandenburg University of Applied Sciences
**<img src="plw.png">


*NODE, NSET=Nall
       1,0.000000000000e+00,1.000000000000e+02,0.000000000000e+00
       2,0.000000000000e+00,9.500000000000e+01,0.000000000000e+00
       3,5.000000000000e+00,9.500000000000e+01,0.000000000000e+00
       4,5.000000000000e+00,1.000000000000e+02,0.000000000000e+00
       5,1.000000000000e+01,9.500000000000e+01,0.000000000000e+00
       6,1.000000000000e+01,1.000000000000e+02,0.000000000000e+00
       7,1.500000000000e+01,9.500000000000e+01,0.000000000000e+00
       8,1.500000000000e+01,1.000000000000e+02,0.000000000000e+00
       9,2.000000000000e+01,9.500000000000e+01,0.000000000000e+00
      10,2.000000000000e+01,1.000000000000e+02,0.000000000000e+00
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*ELEMENT, TYPE=S4, ELSET=Eall
     1,      1,      2,      3,      4
     2,      4,      3,      5,      6
     3,      6,      5,      7,      8
     4,      8,      7,      9,     10
     5,     10,      9,     11,     12
     6,     12,     11,     13,     14
     7,     14,     13,     15,     16
     8,     16,     15,     17,     18
     9,     18,     17,     19,     20
    10,     20,     19,     21,     22
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** Names based on x0
*NSET,NSET=Nx0
1,
2,
43,
64,
85,
106,
127,
148,
169,
190,
211,
232,
253,
274,
295,
316,
337,
358,
379,
400,
421,
** Names based on y0
*NSET,NSET=Ny0
421,
422,
423,
424,
425,
426,
427,
428,
429,
430,
431,
432,
433,
434,
435,
436,
437,
438,
439,
440,
441,
** Names based on outer
*NSET,NSET=Nouter
1,
4,
6,
8,
10,
12,
14,
16,
18,
20,
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*boundary
Nx0,1
Nx0,5
Ny0,2
Ny0,4
Nouter,3,5
*MATERIAL,NAME=sheet
*ELASTIC
200,.3
*SHELL SECTION,ELSET=Eall,MATERIAL=sheet,offset=0
0.5
*time points, name=T10, generate
0,1,0.1
*time points, name=T1, generate
0,1,1
*STEP,nlgeom
*STATIC
0.01,1
*controls,parameters=field
0.5,2,,,1
*dload
Eall,p,0.01
*el file, time points=t10
S
*node file
U
*end step
*STEP,nlgeom
*STATIC
1,1
*controls,parameters=field
0.005,2,,,0.02
*el file, time points=t1
S
*node file
U
*end step
