**Telescoping Tubes Under Bending
**Telescopic structure of linear elastic tubes
**Loaded in pure bending (no shear)
**Surface-to-surface contact
**http://github.com/mkraska/CalculiX-Examples/tree/master/Contact/Tubes
**Created by Martin Kraska,
**Brandenburg University of Applied Sciences
**<img src="tubes.png">

*NODE, NSET=Nall
       1,8.500000000000e+02,0.000000000000e+00,0.000000000000e+00
       2,5.000000000000e+02,0.000000000000e+00,4.500000000000e+01
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*ELEMENT, TYPE=C3D8I, ELSET=Eall
     1,     2,     3,     4,     5,     6,     7,     8,     9
     2,     5,     4,    10,    11,     9,     8,    12,    13
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** Surfaces based on ind
*SURFACE, NAME=Sind
1, S1
19, S1
2, S1
20, S1
3, S1
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900, S1
** Surfaces based on dep
*SURFACE, NAME=Sdep
901, S2
919, S2
902, S2
920, S2
903, S2
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1800, S2
** Surfaces based on load
*SURFACE, NAME=Sload
901, S6
902, S6
903, S6
904, S6
905, S6
906, S6
907, S6
908, S6
909, S6
910, S6
911, S6
912, S6
913, S6
914, S6
915, S6
916, S6
917, S6
918, S6
** Names based on fix
*NSET,NSET=Nfix
1902,
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** Names based on ysym
*NSET,NSET=Nysym
1,
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*nset, nset=control
1
** constraints
*boundary
Nfix,1,3
Nysym,2
** material
*MATERIAL, NAME=Aluminium
*ELASTIC
70000, 0.34
*DENSITY
2.7e-9
*solid section, elset=Eall, material=Aluminium
** contact
*surface interaction, name=telescope
*surface behavior, pressure-overclosure=linear
100000.
*contact pair, interaction=telescope, type=surface to surface
Sdep,Sind
** coupling
*coupling, ref node=1, surface=Sload, constraint name=c1
*kinematic
1
3
*boundary
control,1,2
** step
*step,nlgeom
*static
0.1,1
*boundary
control,5,5,0.3
** output
*NODE FILE
U
*el file
S
*section print, surface=Sload,name=sp1
SOM
*contact file
CSTR
*END STEP
