**Thermal Strain
**Transient coupled thermo-mechanical analysis
**Bending of a plate due to one-sided heating
**http://github.com/mkraska/CalculiX-Examples/tree/master/Thermal/Thermal%20shock
**Created by Martin Kraska,
**Brandenburg University of Applied Sciences
**<img src="shock.png">

*NODE, NSET=Nall
       1,2.000000000000e+00,2.000000000000e+01,0.000000000000e+00
       2,2.000000000000e+00,1.500000000000e+01,0.000000000000e+00
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*ELEMENT, TYPE=C3D20R, ELSET=Eall
     1,     1,     2,     3,     4,     5,     6,     7,     8,     9,    10,
          11,    12,    17,    18,    19,    20,    13,    14,    15,    16
     2,     4,     3,    21,    22,     8,     7,    23,    24,    11,    25,
          26,    27,    19,    30,    31,    32,    16,    15,    28,    29
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** Names based on hist
*NSET,NSET=Nhist
498,
** Names based on path
*NSET,NSET=Npath
1084,
1086,
1091,
1159,
1161,
1202,
1204,
1245,
1247,
1288,
1290,
1331,
1333,
*boundary
** BOUNDARY based on ysym
1084, 2, ,
1085, 2, ,
1086, 2, ,
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1372, 2, ,
** BOUNDARY based on zsym
1, 3, ,
2, 3, ,
5, 3, ,
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1335, 3, ,
** BOUNDARY based on x0
1331, 1, ,
** material definition
*material, name=steel
*elastic
210000,0.333333333,0
*density
7.85e-9
*expansion
12e-6
*conductivity
50.,0
*specific heat
5e8,0
*solid section, elset=Eall, material=steel
** initial temperature
*initial conditions, type=temperature
Nall,0
*step
*COUPLED TEMPERATURE-DISPLACEMENT, direct
0.01,0.5
*amplitude, name=excite
0,0, 0.02,0, 0.04,1, 0.24,1
0.26,0
*dflux,amplitude=excite
** DFlux based on excite
51, S2, 5.000000e+01
111, S2, 5.000000e+01
52, S2, 5.000000e+01
112, S2, 5.000000e+01
53, S2, 5.000000e+01
113, S2, 5.000000e+01
54, S2, 5.000000e+01
114, S2, 5.000000e+01
55, S2, 5.000000e+01
115, S2, 5.000000e+01
56, S2, 5.000000e+01
116, S2, 5.000000e+01
57, S2, 5.000000e+01
117, S2, 5.000000e+01
58, S2, 5.000000e+01
118, S2, 5.000000e+01
59, S2, 5.000000e+01
119, S2, 5.000000e+01
60, S2, 5.000000e+01
120, S2, 5.000000e+01
171, S2, 5.000000e+01
172, S2, 5.000000e+01
173, S2, 5.000000e+01
174, S2, 5.000000e+01
175, S2, 5.000000e+01
176, S2, 5.000000e+01
177, S2, 5.000000e+01
178, S2, 5.000000e+01
179, S2, 5.000000e+01
180, S2, 5.000000e+01
231, S2, 5.000000e+01
232, S2, 5.000000e+01
233, S2, 5.000000e+01
234, S2, 5.000000e+01
235, S2, 5.000000e+01
236, S2, 5.000000e+01
237, S2, 5.000000e+01
238, S2, 5.000000e+01
239, S2, 5.000000e+01
240, S2, 5.000000e+01
*node file
NT,U
*el file
S
*end step
