**
**   Structure: cylinder with several cavities
**   Test objective: cavity radiation for axisymmetric elements
**   If you run this example for the first time, replace
**   *VIEWFACTOR,READ into *VIEWFACTOR,WRITE. It leads to the
**   creation of file axrad2.vwf containing the viewfactors. This
**   can take a while. For subsequent runs this file can be
**   reused by using the *VIEWFACTOR,READ card. This
**   speeds up the execution time.
**
*NODE, NSET=Nall
       1,   1.90000E-1,  -5.00000E-2,   0.00000E+0
       2,   1.90000E-1,  -4.75000E-2,   0.00000E+0
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*NODE, NSET=Nfluid
    1420,   2.13738E-1,   2.01712E-4,  -5.00000E-2
    1421,   9.83122E-2,  -7.61659E-2,  -5.00000E-2
    1422,   9.74378E-2,   7.68608E-2,  -5.00000E-2
*PHYSICAL CONSTANTS, ABSOLUTE ZERO=0.0, STEFAN BOLTZMANN=5.67E-8
*NSET, NSET=TF_1
  1420
*NSET, NSET=TF_2
  1421
*NSET, NSET=TF_3
  1422
*ELEMENT, TYPE=CAX8R, ELSET=MPR.1
     1,     1,     8,     9,     2,  1424,  1425,  1426,  1427
     2,     2,     9,    10,     3,  1426,  1428,  1429,  1430
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*SOLID SECTION, ELSET=MPR.1, MATERIAL=MAT_1
*MATERIAL,NAME=MAT_1
*CONDUCTIVITY,TYPE=ISO
 0.114000E+02,  0.293000E+03
 0.127000E+02,  0.373000E+03
 0.143000E+02,  0.473000E+03
 0.159000E+02,  0.573000E+03
 0.175000E+02,  0.673000E+03
 0.191000E+02,  0.773000E+03
 0.207000E+02,  0.873000E+03
 0.223000E+02,  0.973000E+03
 0.239000E+02,  0.107300E+04
 0.255000E+02,  0.117300E+04
 0.271000E+02,  0.127300E+04
 0.287000E+02,  0.137300E+04
*DENSITY
 0.822000E+04
*SPECIFIC HEAT
 0.431000E+03,  0.293000E+03
 0.451000E+03,  0.373000E+03
 0.476000E+03,  0.473000E+03
 0.501000E+03,  0.573000E+03
 0.527000E+03,  0.673000E+03
 0.551000E+03,  0.773000E+03
 0.576000E+03,  0.873000E+03
 0.601000E+03,  0.973000E+03
 0.627000E+03,  0.107300E+04
 0.651000E+03,  0.117300E+04
 0.676000E+03,  0.127300E+04
 0.701000E+03,  0.137300E+04
*AMPLITUDE,NAME=A_BP_1,TIME=TOTAL TIME
 0.000000E+00,  0.100000E+05,  0.100000E+04,  0.100000E+05,  0.200000E+04,  0.100000E+05
*AMPLITUDE,NAME=A_BP_2,TIME=TOTAL TIME
 0.000000E+00,  0.100000E+06,  0.100000E+04,  0.100000E+06,  0.200000E+04,  0.100000E+06
*AMPLITUDE,NAME=A_TF_1,TIME=TOTAL TIME
 0.000000E+00,  0.150000E+04,  0.100000E+04,  0.150000E+04,  0.200000E+04,  0.150000E+04
*AMPLITUDE,NAME=A_TF_2,TIME=TOTAL TIME
 0.000000E+00,  0.500000E+03,  0.100000E+04,  0.500000E+03,  0.200000E+04,  0.500000E+03
*AMPLITUDE,NAME=A_TF_3,TIME=TOTAL TIME
 0.000000E+00,  0.600000E+03,  0.100000E+04,  0.600000E+03,  0.200000E+04,  0.600000E+03
*AMPLITUDE,NAME=A_EMISS_200101,TIME=TOTAL TIME
 0.000000E+00,  0.720000E+00,  0.100000E+06,  0.720000E+00
*AMPLITUDE,NAME=A_EMISS_200102,TIME=TOTAL TIME
 0.000000E+00,  0.720000E+00,  0.100000E+06,  0.720000E+00
*AMPLITUDE,NAME=A_EMISS_200103,TIME=TOTAL TIME
 0.000000E+00,  0.720000E+00,  0.100000E+06,  0.720000E+00
*AMPLITUDE,NAME=A_EMISS_200104,TIME=TOTAL TIME
 0.000000E+00,  0.720000E+00,  0.100000E+06,  0.720000E+00
*AMPLITUDE,NAME=A_EMISS_200201,TIME=TOTAL TIME
 0.000000E+00,  0.720000E+00,  0.100000E+06,  0.720000E+00
*AMPLITUDE,NAME=A_EMISS_200202,TIME=TOTAL TIME
 0.000000E+00,  0.720000E+00,  0.100000E+06,  0.720000E+00
*AMPLITUDE,NAME=A_EMISS_200203,TIME=TOTAL TIME
 0.000000E+00,  0.720000E+00,  0.100000E+06,  0.720000E+00
*TIME POINTS,NAME=TPRINT
   0.100000E+04
*INITIAL CONDITIONS,TYPE=TEMPERATURE
Nall,  0.600000E+03
Nfluid,  0.600000E+03
*STEP
*HEAT TRANSFER, STEADY STATE
1.0e-6, 1.0e-6
*CONTROLS,PARAMETERS=TIME INCREMENTATION
100,100,9,100,100,4,,5,,
0.25,0.5,0.75,,,,1.5,
*VIEWFACTOR,WRITE
*BOUNDARY,AMPLITUDE=A_TF_1
TF_1, 11, 11, 1.0
*BOUNDARY,AMPLITUDE=A_TF_2
TF_2, 11, 11, 1.0
*BOUNDARY,AMPLITUDE=A_TF_3
TF_3, 11, 11, 1.0
*FILM
    19, F2FCNU1  ,   1420
    20, F2FCNU1  ,   1420
    21, F2FCNU1  ,   1420
    22, F2FCNU1  ,   1420
    23, F2FCNU1  ,   1420
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   504, F3FCNU3  ,   1422
*RADIATE, CAVITY=1
  1021, R4CRNU101,   -1.000, 1.0
  1025, R4CRNU101,   -1.000, 1.0
  1029, R4CRNU101,   -1.000, 1.0
  1033, R4CRNU101,   -1.000, 1.0
  1037, R4CRNU101,   -1.000, 1.0
  1041, R4CRNU101,   -1.000, 1.0
  1045, R4CRNU101,   -1.000, 1.0
  1049, R4CRNU101,   -1.000, 1.0
  1053, R4CRNU101,   -1.000, 1.0
  1057, R4CRNU101,   -1.000, 1.0
  1061, R4CRNU101,   -1.000, 1.0
  1065, R4CRNU101,   -1.000, 1.0
  1069, R4CRNU101,   -1.000, 1.0
  1073, R4CRNU101,   -1.000, 1.0
  1077, R4CRNU101,   -1.000, 1.0
  1081, R4CRNU101,   -1.000, 1.0
  1085, R4CRNU101,   -1.000, 1.0
  1089, R4CRNU101,   -1.000, 1.0
  1093, R4CRNU101,   -1.000, 1.0
  1097, R4CRNU101,   -1.000, 1.0
  1101, R4CRNU101,   -1.000, 1.0
  1105, R4CRNU101,   -1.000, 1.0
  1109, R4CRNU101,   -1.000, 1.0
  1113, R4CRNU101,   -1.000, 1.0
  1117, R4CRNU101,   -1.000, 1.0
  1121, R4CRNU101,   -1.000, 1.0
  1125, R4CRNU101,   -1.000, 1.0
  1129, R4CRNU101,   -1.000, 1.0
  1133, R4CRNU101,   -1.000, 1.0
  1137, R4CRNU101,   -1.000, 1.0
*RADIATE, CAVITY=1
    30, R3CRNU102,   -1.000, 1.0
    36, R3CRNU102,   -1.000, 1.0
    42, R3CRNU102,   -1.000, 1.0
    48, R3CRNU102,   -1.000, 1.0
    54, R3CRNU102,   -1.000, 1.0
    60, R3CRNU102,   -1.000, 1.0
    66, R3CRNU102,   -1.000, 1.0
    72, R3CRNU102,   -1.000, 1.0
    78, R3CRNU102,   -1.000, 1.0
    84, R3CRNU102,   -1.000, 1.0
    90, R3CRNU102,   -1.000, 1.0
    96, R3CRNU102,   -1.000, 1.0
   102, R3CRNU102,   -1.000, 1.0
   108, R3CRNU102,   -1.000, 1.0
   114, R3CRNU102,   -1.000, 1.0
   120, R3CRNU102,   -1.000, 1.0
   126, R3CRNU102,   -1.000, 1.0
   132, R3CRNU102,   -1.000, 1.0
   138, R3CRNU102,   -1.000, 1.0
   144, R3CRNU102,   -1.000, 1.0
   150, R3CRNU102,   -1.000, 1.0
   156, R3CRNU102,   -1.000, 1.0
   162, R3CRNU102,   -1.000, 1.0
   168, R3CRNU102,   -1.000, 1.0
   174, R3CRNU102,   -1.000, 1.0
   180, R3CRNU102,   -1.000, 1.0
   186, R3CRNU102,   -1.000, 1.0
   192, R3CRNU102,   -1.000, 1.0
   198, R3CRNU102,   -1.000, 1.0
   204, R3CRNU102,   -1.000, 1.0
   210, R3CRNU102,   -1.000, 1.0
   216, R3CRNU102,   -1.000, 1.0
   222, R3CRNU102,   -1.000, 1.0
   228, R3CRNU102,   -1.000, 1.0
   234, R3CRNU102,   -1.000, 1.0
   240, R3CRNU102,   -1.000, 1.0
*RADIATE, CAVITY=1
   962, R2CRNU103,   -1.000, 1.0
   964, R2CRNU103,   -1.000, 1.0
   966, R2CRNU103,   -1.000, 1.0
   968, R2CRNU103,   -1.000, 1.0
   970, R2CRNU103,   -1.000, 1.0
   972, R2CRNU103,   -1.000, 1.0
   974, R2CRNU103,   -1.000, 1.0
   976, R2CRNU103,   -1.000, 1.0
   978, R2CRNU103,   -1.000, 1.0
   980, R2CRNU103,   -1.000, 1.0
   982, R2CRNU103,   -1.000, 1.0
   984, R2CRNU103,   -1.000, 1.0
   986, R2CRNU103,   -1.000, 1.0
   988, R2CRNU103,   -1.000, 1.0
   990, R2CRNU103,   -1.000, 1.0
   992, R2CRNU103,   -1.000, 1.0
   994, R2CRNU103,   -1.000, 1.0
   996, R2CRNU103,   -1.000, 1.0
   998, R2CRNU103,   -1.000, 1.0
  1000, R2CRNU103,   -1.000, 1.0
  1002, R2CRNU103,   -1.000, 1.0
  1004, R2CRNU103,   -1.000, 1.0
  1006, R2CRNU103,   -1.000, 1.0
  1008, R2CRNU103,   -1.000, 1.0
  1010, R2CRNU103,   -1.000, 1.0
  1012, R2CRNU103,   -1.000, 1.0
  1014, R2CRNU103,   -1.000, 1.0
  1016, R2CRNU103,   -1.000, 1.0
  1018, R2CRNU103,   -1.000, 1.0
  1020, R2CRNU103,   -1.000, 1.0
*RADIATE, CAVITY=1
   505, R1CRNU104,   -1.000, 1.0
   511, R1CRNU104,   -1.000, 1.0
   517, R1CRNU104,   -1.000, 1.0
   523, R1CRNU104,   -1.000, 1.0
   529, R1CRNU104,   -1.000, 1.0
   535, R1CRNU104,   -1.000, 1.0
   541, R1CRNU104,   -1.000, 1.0
   547, R1CRNU104,   -1.000, 1.0
   553, R1CRNU104,   -1.000, 1.0
   559, R1CRNU104,   -1.000, 1.0
   565, R1CRNU104,   -1.000, 1.0
   571, R1CRNU104,   -1.000, 1.0
   577, R1CRNU104,   -1.000, 1.0
   583, R1CRNU104,   -1.000, 1.0
   589, R1CRNU104,   -1.000, 1.0
   595, R1CRNU104,   -1.000, 1.0
   601, R1CRNU104,   -1.000, 1.0
   607, R1CRNU104,   -1.000, 1.0
   613, R1CRNU104,   -1.000, 1.0
   619, R1CRNU104,   -1.000, 1.0
   625, R1CRNU104,   -1.000, 1.0
   631, R1CRNU104,   -1.000, 1.0
   637, R1CRNU104,   -1.000, 1.0
   643, R1CRNU104,   -1.000, 1.0
   649, R1CRNU104,   -1.000, 1.0
   655, R1CRNU104,   -1.000, 1.0
   661, R1CRNU104,   -1.000, 1.0
   667, R1CRNU104,   -1.000, 1.0
   673, R1CRNU104,   -1.000, 1.0
   679, R1CRNU104,   -1.000, 1.0
   685, R1CRNU104,   -1.000, 1.0
   691, R1CRNU104,   -1.000, 1.0
   697, R1CRNU104,   -1.000, 1.0
   703, R1CRNU104,   -1.000, 1.0
   709, R1CRNU104,   -1.000, 1.0
   715, R1CRNU104,   -1.000, 1.0
*RADIATE, CAVITY=2
   246, R3CRNU201,   -1.000, 1.0
   252, R3CRNU201,   -1.000, 1.0
   258, R3CRNU201,   -1.000, 1.0
   264, R3CRNU201,   -1.000, 1.0
   270, R3CRNU201,   -1.000, 1.0
   276, R3CRNU201,   -1.000, 1.0
   282, R3CRNU201,   -1.000, 1.0
   288, R3CRNU201,   -1.000, 1.0
   294, R3CRNU201,   -1.000, 1.0
   300, R3CRNU201,   -1.000, 1.0
   306, R3CRNU201,   -1.000, 1.0
   312, R3CRNU201,   -1.000, 1.0
   318, R3CRNU201,   -1.000, 1.0
   324, R3CRNU201,   -1.000, 1.0
   330, R3CRNU201,   -1.000, 1.0
   336, R3CRNU201,   -1.000, 1.0
   342, R3CRNU201,   -1.000, 1.0
   348, R3CRNU201,   -1.000, 1.0
   354, R3CRNU201,   -1.000, 1.0
   360, R3CRNU201,   -1.000, 1.0
   366, R3CRNU201,   -1.000, 1.0
   372, R3CRNU201,   -1.000, 1.0
   378, R3CRNU201,   -1.000, 1.0
   384, R3CRNU201,   -1.000, 1.0
   390, R3CRNU201,   -1.000, 1.0
   396, R3CRNU201,   -1.000, 1.0
   402, R3CRNU201,   -1.000, 1.0
   408, R3CRNU201,   -1.000, 1.0
   414, R3CRNU201,   -1.000, 1.0
   420, R3CRNU201,   -1.000, 1.0
   426, R3CRNU201,   -1.000, 1.0
   432, R3CRNU201,   -1.000, 1.0
   438, R3CRNU201,   -1.000, 1.0
   444, R3CRNU201,   -1.000, 1.0
   450, R3CRNU201,   -1.000, 1.0
   456, R3CRNU201,   -1.000, 1.0
   462, R3CRNU201,   -1.000, 1.0
   468, R3CRNU201,   -1.000, 1.0
*RADIATE, CAVITY=2
   961, R4CRNU202,   -1.000, 1.0
   963, R4CRNU202,   -1.000, 1.0
   965, R4CRNU202,   -1.000, 1.0
   967, R4CRNU202,   -1.000, 1.0
   969, R4CRNU202,   -1.000, 1.0
   971, R4CRNU202,   -1.000, 1.0
   973, R4CRNU202,   -1.000, 1.0
   975, R4CRNU202,   -1.000, 1.0
   977, R4CRNU202,   -1.000, 1.0
   979, R4CRNU202,   -1.000, 1.0
   981, R4CRNU202,   -1.000, 1.0
   983, R4CRNU202,   -1.000, 1.0
   985, R4CRNU202,   -1.000, 1.0
   987, R4CRNU202,   -1.000, 1.0
   989, R4CRNU202,   -1.000, 1.0
   991, R4CRNU202,   -1.000, 1.0
   993, R4CRNU202,   -1.000, 1.0
   995, R4CRNU202,   -1.000, 1.0
   997, R4CRNU202,   -1.000, 1.0
   999, R4CRNU202,   -1.000, 1.0
  1001, R4CRNU202,   -1.000, 1.0
  1003, R4CRNU202,   -1.000, 1.0
  1005, R4CRNU202,   -1.000, 1.0
  1007, R4CRNU202,   -1.000, 1.0
  1009, R4CRNU202,   -1.000, 1.0
  1011, R4CRNU202,   -1.000, 1.0
  1013, R4CRNU202,   -1.000, 1.0
  1015, R4CRNU202,   -1.000, 1.0
  1017, R4CRNU202,   -1.000, 1.0
  1019, R4CRNU202,   -1.000, 1.0
*RADIATE, CAVITY=2
   721, R1CRNU203,   -1.000, 1.0
   727, R1CRNU203,   -1.000, 1.0
   733, R1CRNU203,   -1.000, 1.0
   739, R1CRNU203,   -1.000, 1.0
   745, R1CRNU203,   -1.000, 1.0
   751, R1CRNU203,   -1.000, 1.0
   757, R1CRNU203,   -1.000, 1.0
   763, R1CRNU203,   -1.000, 1.0
   769, R1CRNU203,   -1.000, 1.0
   775, R1CRNU203,   -1.000, 1.0
   781, R1CRNU203,   -1.000, 1.0
   787, R1CRNU203,   -1.000, 1.0
   793, R1CRNU203,   -1.000, 1.0
   799, R1CRNU203,   -1.000, 1.0
   805, R1CRNU203,   -1.000, 1.0
   811, R1CRNU203,   -1.000, 1.0
   817, R1CRNU203,   -1.000, 1.0
   823, R1CRNU203,   -1.000, 1.0
   829, R1CRNU203,   -1.000, 1.0
   835, R1CRNU203,   -1.000, 1.0
   841, R1CRNU203,   -1.000, 1.0
   847, R1CRNU203,   -1.000, 1.0
   853, R1CRNU203,   -1.000, 1.0
   859, R1CRNU203,   -1.000, 1.0
   865, R1CRNU203,   -1.000, 1.0
   871, R1CRNU203,   -1.000, 1.0
   877, R1CRNU203,   -1.000, 1.0
   883, R1CRNU203,   -1.000, 1.0
   889, R1CRNU203,   -1.000, 1.0
   895, R1CRNU203,   -1.000, 1.0
   901, R1CRNU203,   -1.000, 1.0
   907, R1CRNU203,   -1.000, 1.0
   913, R1CRNU203,   -1.000, 1.0
   919, R1CRNU203,   -1.000, 1.0
   925, R1CRNU203,   -1.000, 1.0
   931, R1CRNU203,   -1.000, 1.0
   937, R1CRNU203,   -1.000, 1.0
   943, R1CRNU203,   -1.000, 1.0
*NODE PRINT,TIMEPOINTS=TPRINT,NSET=Nall
NT
*END STEP
