**
**   Structure: ball falling on plate.
**   Test objective: dynamic contact.
**                   for complete calculation change
**                   step time from 0.001 to 1.00
**
*NODE, NSET=Nall
1, 0.000000000000e+00, 0.000000000000e+00, 0.000000000000e+00
2, 0.000000000000e+00, 3.535533905933e+00, -3.535533905933e+00
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*ELEMENT, TYPE=C3D8, ELSET=elall
1, 1, 2, 3, 4, 5, 6, 7, 8
2, 4, 3, 9, 10, 8, 7, 11, 12
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*node, nset=nfloor
6001,   0.0, -50.0, -90.0
6002, 100.0, -50.0, -90.0
6003, 100.0,  50.0, -90.0
6004,   0.0,  50.0, -90.0
6005,  50.0, -50.0, -90.0
6006, 100.0,   0.0, -90.0
6007,  50.0,  50.0, -90.0
6008,   0.0,   0.0, -90.0
*element, type=s8, elset=efloor
800, 6001, 6002, 6003, 6004, 6005, 6006, 6007, 6008
*NSET,NSET=nsurface
17, 18, 19, 20, 29, 30
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*time points, name=times, generate
0.0, 1.0, 0.0010
*boundary
nfloor, 1, 6,
*material, name=gummi
*elastic
1000.0, 0.3
*density
2.5e-09,
*solid section, elset=elall, material=gummi
*shell section, elset=efloor, material=gummi
0.01
*initial conditions, type=velocity
nall, 1, 100.0
*surface, name=floor, type=element
efloor, SPOS
*surface, name=ball, type=node
nsurface
*contact pair, interaction=contact,TYPE=NODE TO SURFACE
ball, floor
*surface interaction, name=contact
*surface behavior, pressure-overclosure=exponential
0.001, 1.0
*step, nlgeom, inc=1000000
*dynamic
0.001, 0.001, 0.000000001 , 0.002
*dload
elall, grav, 9810.0, 0.0, 0.0, -1.0
*node print, nset=nall, time points=times
u
*endstep
