**
**   Structure: cantilever beam.
**   Test objective: frequency sensitivity w.r.t the geometry
**
*HEADING
Model: beam     Date: 10-Mar-1998
*NODE
     1,      0.000000,      0.000000,      0.000000
     2,      1.000000,      0.000000,      0.000000
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*ELEMENT, TYPE=C3D8  , ELSET=Eall
     1,     1,    10,    95,    19,    61,   105,   222,   192,     9,    93,
     2,    10,     2,    13,    95,   105,    34,   134,   222,    11,    12,
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*EQUATION
2
355,1,1.,55,1,-1.
2
355,2,1.,55,2,-1.
2
355,3,1.,55,3,-1.
2
417,1,1.,117,1,-1.
2
417,2,1.,117,2,-1.
2
417,3,1.,117,3,-1.
2
340,1,1.,40,1,-1.
2
340,2,1.,40,2,-1.
2
340,3,1.,40,3,-1.
2
504,1,1.,204,1,-1.
2
504,2,1.,204,2,-1.
2
504,3,1.,204,3,-1.
2
540,1,1.,240,1,-1.
2
540,2,1.,240,2,-1.
2
540,3,1.,240,3,-1.
2
446,1,1.,146,1,-1.
2
446,2,1.,146,2,-1.
2
446,3,1.,146,3,-1.
2
385,1,1.,85,1,-1.
2
385,2,1.,85,2,-1.
2
385,3,1.,85,3,-1.
2
475,1,1.,175,1,-1.
2
475,2,1.,175,2,-1.
2
475,3,1.,175,3,-1.
2
370,1,1.,70,1,-1.
2
370,2,1.,70,2,-1.
2
370,3,1.,70,3,-1.
*NSET, NSET=FIX
    97,    96,    95,    94,    93,    20
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*BOUNDARY
FIX, 1
*BOUNDARY
FIX, 2
*BOUNDARY
FIX, 3
*NSET,NSET=Nall,GENERATE
1,261
*MATERIAL,NAME=EL
*ELASTIC
  210000.0,        .3
*DENSITY
7.8E-9
*DESIGNVARIABLES,TYPE=COORDINATE
Nall
*SOLID SECTION,ELSET=Eall,MATERIAL=EL
*STEP
*STATIC
*CLOAD
100,3,1.E5
*NODE FILE
U
*END STEP
*STEP,PERTURBATION
*FREQUENCY,STORAGE=YES
10
*NODE FILE
U
*END STEP
*STEP,NLGEOM
*SENSITIVITY
*OBJECTIVE
EIGENFREQUENCY
*NODE FILE
SEN
*END STEP
