**
**   Structure: cantilever beam.
**   Test objective: forced convection
**                   use of THERMAL NETWORK on the *STEP card
**                   simulateneous temperature solution
**
*HEADING
Model: beam     Date: 10-Mar-1998
*NODE
     1,      0.000000,      0.000000,      0.000000
     2,      1.000000,      0.000000,      0.000000
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*ELEMENT, TYPE=C3D20R   , ELSET=B1
     1,     1,    10,    95,    19,    61,   105,   222,   192,     9,    93,
           94,    20,   104,   220,   221,   193,    62,   103,   219,   190
     2,    10,     2,    13,    95,   105,    34,   134,   222,    11,    12,
           96,    93,   106,   133,   223,   220,   103,    33,   132,   219
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*ELEMENT, TYPE=D,ELSET=EGAS
33,263,272,264
34,264,273,265
35,265,274,266
36,266,275,267
37,267,276,268
38,268,277,269
39,269,278,270
40,270,279,271
*NSET, NSET=CN7
    97,    96,    95,    94,    93,    20
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*NSET,NSET=Nall,GENERATE
1,271
*ELSET,ELSET=Eall,GENERATE
1,32
*MATERIAL,NAME=EL
*DENSITY
7.8E-9
*CONDUCTIVITY
50.,0.
*SPECIFIC HEAT
446.E6
*SOLID SECTION,ELSET=Eall,MATERIAL=EL
*MATERIAL,NAME=GAS
*SPECIFIC HEAT
1.E6
***DENSITY
**1.E-9
*FLUID SECTION,ELSET=EGAS,MATERIAL=GAS,TYPE=GASPIPE FANNO ADIABATIC
0.785,1.,8.,0.01,1
*NSET,NSET=GIBO
5,
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*INITIAL CONDITIONS,TYPE=TEMPERATURE
Nall,20.
*NSET,NSET=Ntop
1,
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*STEP,INC=100,THERMAL NETWORK
*HEAT TRANSFER,STEADY STATE
1.,1.
*BOUNDARY,MASS FLOW
272,1,1,1.e-4
273,1,1,1.e-4
274,1,1,1.e-4
275,1,1,1.e-4
276,1,1,1.e-4
277,1,1,1.e-4
278,1,1,1.e-4
279,1,1,1.e-4
*BOUNDARY
Ntop,11,11,20.
263,11,11,100.
**263,2,2,0.1
**264,2,2,0.1
**265,2,2,0.1
**266,2,2,0.1
**267,2,2,0.1
**268,2,2,0.1
**269,2,2,0.1
**270,2,2,0.1
**271,2,2,0.1
*FILM
3, F5FC,263, 10.
4, F5FC,263, 10.
7, F5FC,264, 10.
8, F5FC,264, 10.
11, F5FC,265, 10.
12, F5FC,265, 10.
15, F5FC,266, 10.
16, F5FC,266, 10.
19, F5FC,267, 10.
20, F5FC,267, 10.
23, F5FC,268, 10.
24, F5FC,268, 10.
27, F5FC,269, 10.
28, F5FC,269, 10.
31, F5FC,270, 10.
32, F5FC,270, 10.
*CFLUX
268,11,3000.
*NODE PRINT,NSET=Nall,FREQUENCY=1
NT
*EL PRINT,ELSET=Eall,FREQUENCY=1
HFL
*END STEP
