**
**   Structure: two cubes on top of each other.
**   Test objective: contact of middle nodes.
**
*NODE, NSET=Nall
       1,1.000000000000e+00,1.000000000000e+00,0.000000000000e+00
       2,1.000000000000e+00,0.000000000000e+00,0.000000000000e+00
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*ELEMENT, TYPE=C3D20, ELSET=Eall
     1,     1,     2,     3,     4,     5,     6,     7,     8,     9,    10,
          11,    12,    17,    18,    19,    20,    13,    14,    15,    16
     2,    21,    22,    23,    24,    25,    26,    27,    28,    29,    30,
          31,    32,    37,    38,    39,    40,    33,    34,    35,    36
*NSET,NSET=Nfix
1,
2,
5,
6,
9,
13,
14,
17,
*BOUNDARY
Nfix,1,3
*NSET,NSET=Nfix2
23,
24,
27,
28,
31,
35,
36,
39,
*BOUNDARY
Nfix2,1,2
*NSET,NSET=Nslav
21,
22,
25,
26,
29,
33,
34,
37,
*SURFACE,NAME=Sslav
2, S3
*SURFACE,NAME=Smast
1, S5
*CONTACT PAIR,INTERACTION=SI1,TYPE=SURFACE TO SURFACE
Sslav,Smast
*SURFACE INTERACTION,NAME=SI1
*SURFACE BEHAVIOR,PRESSURE-OVERCLOSURE=LINEAR
1.E7,1.
*MATERIAL,NAME=EL
*ELASTIC
210000.,.0
*SOLID SECTION,ELSET=Eall,MATERIAL=EL
*STEP,NLGEOM
*STATIC
.5,1.
*DLOAD
2, P5, 100.000000
*NODE PRINT,NSET=Nall,FREQUENCY=10
U
*END STEP
