**
**   Structure: 2d Couette compressible concentric fluid flow
**              4 layers in circumferential direction
**   Test objective: CFD Finite Volume Method with cyclic symmetry
**                   inner wall: tangential velocity 2, temperature 1.
**                   outer wall: tangential velocity 1, temperature 1.
**                   viscous stress and heat flux output in a
**                   local cylindrical system
**   Analytical solution: v proportional to 1/r
**                        T (r=0.75) = 1.467
**                        p difference inner/outer wall = ?
**
*NODE, NSET=Nall
       1,-1.000000000000e+00,0.000000000000e+00,0.000000000000e+00
       2,-9.807852804032e-01,1.950903220161e-01,0.000000000000e+00
       3,-9.807852804032e-01,1.950903220161e-01,1.000000000000e-01
       4,-1.000000000000e+00,0.000000000000e+00,1.000000000000e-01
       5,-8.750000000000e-01,0.000000000000e+00,0.000000000000e+00
       6,-8.581871203528e-01,1.707040317641e-01,-2.220446049250e-16
       7,-8.581871203528e-01,1.707040317641e-01,1.000000000000e-01
       8,-8.750000000000e-01,0.000000000000e+00,1.000000000000e-01
       9,-7.500000000000e-01,0.000000000000e+00,0.000000000000e+00
      10,-7.355889603024e-01,1.463177415121e-01,5.551115123126e-17
      11,-7.355889603024e-01,1.463177415121e-01,1.000000000000e-01
      12,-7.500000000000e-01,0.000000000000e+00,1.000000000000e-01
      13,-6.250000000000e-01,0.000000000000e+00,0.000000000000e+00
      14,-6.129908002520e-01,1.219314512601e-01,0.000000000000e+00
      15,-6.129908002520e-01,1.219314512601e-01,1.000000000000e-01
      16,-6.250000000000e-01,0.000000000000e+00,1.000000000000e-01
      17,-5.000000000000e-01,0.000000000000e+00,0.000000000000e+00
      18,-4.903926402016e-01,9.754516100806e-02,0.000000000000e+00
      19,-4.903926402016e-01,9.754516100806e-02,1.000000000000e-01
      20,-5.000000000000e-01,0.000000000000e+00,1.000000000000e-01
      21,-9.238795325113e-01,3.826834323651e-01,0.000000000000e+00
      22,-9.238795325113e-01,3.826834323651e-01,1.000000000000e-01
      23,-8.083945909474e-01,3.348480033195e-01,0.000000000000e+00
      24,-8.083945909474e-01,3.348480033195e-01,1.000000000000e-01
      25,-6.929096493835e-01,2.870125742738e-01,1.110223024625e-16
      26,-6.929096493835e-01,2.870125742738e-01,1.000000000000e-01
      27,-5.774247078196e-01,2.391771452282e-01,1.110223024625e-16
      28,-5.774247078196e-01,2.391771452282e-01,1.000000000000e-01
      29,-4.619397662556e-01,1.913417161825e-01,0.000000000000e+00
      30,-4.619397662556e-01,1.913417161825e-01,1.000000000000e-01
      31,-8.314696123025e-01,5.555702330196e-01,0.000000000000e+00
      32,-8.314696123025e-01,5.555702330196e-01,1.000000000000e-01
      33,-7.275359107647e-01,4.861239538922e-01,0.000000000000e+00
      34,-7.275359107647e-01,4.861239538922e-01,1.000000000000e-01
      35,-6.236022092269e-01,4.166776747647e-01,0.000000000000e+00
      36,-6.236022092269e-01,4.166776747647e-01,1.000000000000e-01
      37,-5.196685076891e-01,3.472313956373e-01,0.000000000000e+00
      38,-5.196685076891e-01,3.472313956373e-01,1.000000000000e-01
      39,-4.157348061513e-01,2.777851165098e-01,0.000000000000e+00
      40,-4.157348061513e-01,2.777851165098e-01,1.000000000000e-01
      41,-7.071067811865e-01,7.071067811865e-01,0.000000000000e+00
      42,-7.071067811865e-01,7.071067811865e-01,1.000000000000e-01
      43,-6.187184335382e-01,6.187184335382e-01,-1.110223024625e-16
      44,-6.187184335382e-01,6.187184335382e-01,1.000000000000e-01
      45,-5.303300858899e-01,5.303300858899e-01,5.551115123126e-17
      46,-5.303300858899e-01,5.303300858899e-01,1.000000000000e-01
      47,-4.419417382416e-01,4.419417382416e-01,-2.220446049250e-16
      48,-4.419417382416e-01,4.419417382416e-01,1.000000000000e-01
      49,-3.535533905933e-01,3.535533905933e-01,0.000000000000e+00
      50,-3.535533905933e-01,3.535533905933e-01,1.000000000000e-01
*ELEMENT, TYPE=F3D8, ELSET=Eall
     1,     1,     2,     3,     4,     5,     6,     7,     8
     2,     5,     6,     7,     8,     9,    10,    11,    12
     3,     9,    10,    11,    12,    13,    14,    15,    16
     4,    13,    14,    15,    16,    17,    18,    19,    20
     5,     2,    21,    22,     3,     6,    23,    24,     7
     6,     6,    23,    24,     7,    10,    25,    26,    11
     7,    10,    25,    26,    11,    14,    27,    28,    15
     8,    14,    27,    28,    15,    18,    29,    30,    19
     9,    21,    31,    32,    22,    23,    33,    34,    24
    10,    23,    33,    34,    24,    25,    35,    36,    26
    11,    25,    35,    36,    26,    27,    37,    38,    28
    12,    27,    37,    38,    28,    29,    39,    40,    30
    13,    31,    41,    42,    32,    33,    43,    44,    34
    14,    33,    43,    44,    34,    35,    45,    46,    36
    15,    35,    45,    46,    36,    37,    47,    48,    38
    16,    37,    47,    48,    38,    39,    49,    50,    40
*SURFACE, NAME=SOLIDSURFACE
1, S1
5, S1
4, S2
8, S2
9, S1
12, S2
13, S1
16, S2
*TRANSFORMF,TYPE=C,SURFACE=SOLIDSURFACE
0.,0.,0.,0.,0.,1.
*MATERIAL,NAME=AIR
*FLUID CONSTANTS
1.,1.
*SPECIFIC GAS CONSTANT
0.285714286
*CONDUCTIVITY
1.
*SOLID SECTION,ELSET=Eall,MATERIAL=AIR
*INITIAL CONDITIONS,TYPE=PRESSURE
Nall,1.
*INITIAL CONDITIONS,TYPE=FLUID VELOCITY
Nall,1,0.
Nall,2,0.
Nall,3,0.
*INITIAL CONDITIONS,TYPE=TEMPERATURE
Nall,1.
** Surfaces based on mast
*SURFACE, NAME=Smast
1, S6
2, S6
3, S6
4, S6
** Surfaces based on slav
*SURFACE, NAME=Sslav
13, S4
14, S4
15, S4
16, S4
*TIE,FLUIDCYCLIC,NAME=T1
Sslav,Smast
*CYCLIC SYMMETRY MODEL,TIE=T1,N=8
0.,0.,0.,0.,0.,1.
*STEP,INCF=250
*CFD,STEADY STATE,COMPRESSIBLE
*BOUNDARYF
4, S2, 1,, 0.000000
4, S2, 2,, 2.000000
4, S2, 3,, 0.000000
4, S2, 11,, 1.000000
8, S2, 1,, 0.000000
8, S2, 2,, 2.000000
8, S2, 3,, 0.000000
8, S2, 11,, 1.000000
12, S2, 1,, 0.000000
12, S2, 2,, 2.000000
12, S2, 3,, 0.000000
12, S2, 11,, 1.000000
16, S2, 1,, 0.000000
16, S2, 2,, 2.000000
16, S2, 3,, 0.000000
16, S2, 11,, 1.000000
1, S1, 1,, 0.000000
1, S1, 2,, 1.000000
1, S1, 3,, 0.000000
1, S1, 11,, 1.000000
5, S1, 1,, 0.000000
5, S1, 2,, 1.000000
5, S1, 3,, 0.000000
5, S1, 11,, 1.000000
9, S1, 1,, 0.000000
9, S1, 2,, 1.000000
9, S1, 3,, 0.000000
9, S1, 11,, 1.000000
13, S1, 1,, 0.000000
13, S1, 2,, 1.000000
13, S1, 3,, 0.000000
13, S1, 11,, 1.000000
*DFLUX
1, S3, 0.000000e+00
5, S3, 0.000000e+00
1, S5, 0.000000e+00
5, S5, 0.000000e+00
2, S3, 0.000000e+00
6, S3, 0.000000e+00
2, S5, 0.000000e+00
6, S5, 0.000000e+00
3, S3, 0.000000e+00
7, S3, 0.000000e+00
3, S5, 0.000000e+00
7, S5, 0.000000e+00
4, S3, 0.000000e+00
8, S3, 0.000000e+00
4, S5, 0.000000e+00
8, S5, 0.000000e+00
9, S3, 0.000000e+00
9, S5, 0.000000e+00
10, S3, 0.000000e+00
10, S5, 0.000000e+00
11, S3, 0.000000e+00
11, S5, 0.000000e+00
12, S3, 0.000000e+00
12, S5, 0.000000e+00
13, S3, 0.000000e+00
13, S5, 0.000000e+00
14, S3, 0.000000e+00
14, S5, 0.000000e+00
15, S3, 0.000000e+00
15, S5, 0.000000e+00
16, S3, 0.000000e+00
16, S5, 0.000000e+00
*MASS FLOW
1, M3, 0.000000e+00
5, M3, 0.000000e+00
1, M5, 0.000000e+00
5, M5, 0.000000e+00
2, M3, 0.000000e+00
6, M3, 0.000000e+00
2, M5, 0.000000e+00
6, M5, 0.000000e+00
3, M3, 0.000000e+00
7, M3, 0.000000e+00
3, M5, 0.000000e+00
7, M5, 0.000000e+00
4, M3, 0.000000e+00
8, M3, 0.000000e+00
4, M5, 0.000000e+00
8, M5, 0.000000e+00
9, M3, 0.000000e+00
9, M5, 0.000000e+00
10, M3, 0.000000e+00
10, M5, 0.000000e+00
11, M3, 0.000000e+00
11, M5, 0.000000e+00
12, M3, 0.000000e+00
12, M5, 0.000000e+00
13, M3, 0.000000e+00
13, M5, 0.000000e+00
14, M3, 0.000000e+00
14, M5, 0.000000e+00
15, M3, 0.000000e+00
15, M5, 0.000000e+00
16, M3, 0.000000e+00
16, M5, 0.000000e+00
*NODE FILE,FREQUENCYF=250
VF,PSF,TSF
*END STEP
