**
**   Structure: two cubes loaded by shear.
**   Test objective: face-to-face penalty
**                   tied contact
**                   to compare with examples cubef2f1 and cubef2f2
**
*NODE
         1,  0.0            ,  0.0            ,  0.0
         2,  0.125          ,  0.0            ,  0.0
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*ELEMENT,TYPE=C3D10,ELSET=auto1
       685,       777,       780,       736,       785,      2938,      2761,      2760,
      2939,      2949,      2762
       686,       765,       758,       750,       772,      2862,      2829,      2830,
      2892,      2863,      2831
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*ELEMENT,TYPE=C3D20,ELSET=auto1
        65,        44,        43,        47,        46,        82,        85,        84,
        83,       917,       918,       928,       922,      1013,      1021,      1017,
      1012,       924,       920,       931,       930
        66,        82,        85,        84,        83,        86,        89,        88,
        87,      1013,      1021,      1017,      1012,      1029,      1037,      1033,
      1028,      1014,      1025,      1022,      1018
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*ELSET,ELSET=Eall
65,
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*NSET,NSET=Nbottom
1,
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*NSET,NSET=Ntop
748,
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*SURFACE, NAME=Master
361, S6
417, S6
233, S6
377, S6
569, S6
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496, S6
*SURFACE, NAME=Slave
694, S1
753, S3
716, S4
754, S4
744, S2
738, S3
711, S3
695, S4
696, S3
718, S3
703, S1
710, S3
709, S1
735, S2
750, S2
719, S4
769, S4
780, S3
*NSET,NSET=Nbottom
1,
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*NSET,NSET=Ntop
748,
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*BOUNDARY
1,1,2
9,2,2
Nbottom,3,3
*TIE,NAME=T1
Slave,Master
*SURFACE INTERACTION,NAME=SI1
*SURFACE BEHAVIOR,PRESSURE-OVERCLOSURE=TIED
1.e7
*FRICTION
1.e30,1.e7
*MATERIAL,NAME=EL
*ELASTIC
210000.,.3
*DENSITY
7.8E-9
*SOLID SECTION,ELSET=Eall,MATERIAL=EL
*STEP
*STATIC
1.,1.
*BOUNDARY
Ntop,1,1,.01
Nbottom,1,3
*EL FILE,POSITION=AVERAGED AT NODES
S
*END STEP
