**
**   Structure: two cubes.
**   Test objective: Penalty contact.
**
*NODE, NSET=Nall
       1,1.000000000000e+00,1.000000000000e+00,0.000000000000e+00
       2,1.000000000000e+00,6.666666666667e-01,0.000000000000e+00
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*ELEMENT, TYPE=C3D8, ELSET=Eall
     1,     1,     2,     3,     4,     5,     6,     7,     8
     2,     4,     3,     9,    10,     8,     7,    11,    12
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*MATERIAL,NAME=EL
*ELASTIC
210000.,.0
*SOLID SECTION,ELSET=Eall,MATERIAL=EL
*NSET,NSET=Nfix
1,
2,
5,
6,
17,
18,
25,
26,
33,
35,
41,
45,
49,
51,
57,
61,
*NSET,NSET=Nload
77,
78,
79,
80,
87,
88,
95,
96,
103,
104,
108,
112,
119,
120,
124,
128,
*BOUNDARY
Nfix,1,3
Nload,1,2
*SURFACE, NAME=Smast
3, S5
6, S5
9, S5
12, S5
15, S5
18, S5
21, S5
24, S5
27, S5
*SURFACE, NAME=Sslav
28, S3
31, S3
34, S3
37, S3
40, S3
43, S3
46, S3
49, S3
52, S3
*CONTACT PAIR,INTERACTION=SI1,TYPE=NODE TO SURFACE
Sslav,Smast
*SURFACE INTERACTION,NAME=SI1
*SURFACE BEHAVIOR,PRESSURE-OVERCLOSURE=LINEAR
1.e6,3.
*STEP,NLGEOM
*STATIC
1.,1.
*DLOAD
30, P5, 100.000000
33, P5, 100.000000
36, P5, 100.000000
39, P5, 100.000000
42, P5, 100.000000
45, P5, 100.000000
48, P5, 100.000000
51, P5, 100.000000
54, P5, 100.000000
*NODE PRINT,NSET=Nall
U
*NODE FILE
U
*EL FILE,POSITION=NODES
S
*CONTACT FILE
CDISP,CSTRESS
*END STEP
