**
**   Structure: spring + mass + dashpot.
**   Test objective: steady state dynamics calculation of a
**                   spring-mass-dashpot system
**
*NODE,NSET=NALL
1,0.,0.,0.
2,1.,0.,0.
3,1.,-.1,.1
4,1.2,-.1,.1
5,1.2,-.1,-.1
6,1.,-.1,-.1
7,1.,.1,.1
8,1.2,.1,.1
9,1.2,.1,-.1
10,1.,.1,-.1
*ELEMENT,TYPE=SPRINGA,ELSET=ESPRING
1,1,2
*ELEMENT,TYPE=C3D8,ELSET=EMASSA
2,3,4,5,6,7,8,9,10
*ELEMENT,TYPE=DASHPOTA,ELSET=EDASH
3,1,2
*BOUNDARY
1,1,3
2,2,3
*NSET,NSET=NMASSA,GENERATE
3,10
*NSET,NSET=N1
1
*NSET,NSET=N2
2
*BOUNDARY
NMASSA,2,3
*SPRING,ELSET=ESPRING

10.
*DASHPOT,ELSET=EDASH

1.e-7
*MATERIAL,NAME=EL
*ELASTIC
210000.,.3
*DENSITY
7.8E-9
*SOLID SECTION,ELSET=EMASSA,MATERIAL=EL
*EQUATION
5
2,1,1.,3,1,-.25,6,1,-.25,7,1,-.25,
10,1,-.25
*STEP
*FREQUENCY,STORAGE=YES
1
*END STEP
*STEP
*STEADY STATE DYNAMICS
63000,64000
*CLOAD
4,1,1.E-2
5,1,1.E-2
8,1,1.E-2
9,1,1.E-2
*NODE PRINT,NSET=N2
U
*NODE PRINT,NSET=N1
RF
*END STEP
*STEP
