**
**   Structure: metal forming configuration.
**   Test objective: contact combined with plasticity.
**                   change the step time to 1. to get
**                   the complete forming process
**
*node, nset=nall
1, -9.18485e-17, 9.75, 0,
2, 0, 10.25, 0,
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
*nset, nset=sheetleft
1021, 1022, 1020,
*nset, nset=sheetdown
1023, 1024, 1025, 1026, 1027, 1028
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*nset, nset=sheetup
910, 912, 913, 914, 915, 916
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*nset, nset=sheetright
1133, 1132, 911,
*nset, nset=matrizedown
1592, 1593, 1594, 1595, 1596, 1597, 1598,
1599, 1600, 1601, 1591,
*nset, nset=matrizeright
1602, 1603, 1604, 1605, 1606, 1607
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*nset, nset=matrizeup
1573, 1574, 1575, 1576, 1577, 1578
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*nset, nset=stempelleft
1, 3, 4, 5, 6, 7
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*nset, nset=stempelup
59, 60, 61, 62, 63, 64
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*nset, nset=stempeldown
22, 23, 24, 25, 26, 27
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*nset, nset=Grstempel_Nodes
470, 558, 559, 561, 563, 565
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*nset, nset=stempelup_rotated_1
470, 558, 559, 561, 563, 565
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*nset, nset=stempeldown_rotated_1
557, 467, 468, 490, 491, 493
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*nset, nset=Grsheet_Nodes
1134, 1135, 1136, 1137, 1138, 1139
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*nset, nset=sheetup_rotated_1
1244, 1245, 1248, 1249, 1252, 1253
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*nset, nset=sheetdown_rotated_1
1324, 1325, 1328, 1329, 1332, 1333
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*nset, nset=sheetright_rotated_1
1369, 1370, 1572,
*nset, nset=Grmatrize_Nodes
1632, 1633, 1634, 1635, 1636, 1637
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*nset, nset=matrizeup_rotated_1
1804, 1805, 1808, 1809, 1812, 1813
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*nset, nset=matrizedown_rotated_1
1840, 1841, 1843, 1845, 1847, 1849, 1851,
1853, 1855, 1839, 1857,
*nset, nset=matrizeright_rotated_1
1858, 1859, 1861, 1863, 1865, 1867
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*element, elset=C3D8,type=C3D8
1, 1156, 1180, 1067, 1066, 1287, 1335, 1336, 1523,
2, 1202, 1203, 923, 922, 1382, 1384, 1383, 1381,
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*elset, elset=Grsheet_Volumes
1, 2, 3, 5, 11, 13
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*elset, elset=Grmatrize_Volumes
4, 6, 7, 9, 10, 12
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*elset, elset=Grstempel_Volumes
8, 17, 24, 26, 29, 31
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*element, elset=C3D6,type=C3D6
821, 7, 476, 85, 8, 477, 86,
822, 4, 473, 82, 5, 474, 83,
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*elset, elset=Grsheet_Volumes
832, 837,
*elset, elset=Grmatrize_Volumes
835,
*elset, elset=Grstempel_Volumes
821, 822, 823, 824, 825, 826
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*elset, elset=stempeldown_rotatedF2
825,
*elset, elset=Xstempeldown_rotatedF5
8,425,815,410,793,397,
785,393,776,372,764,361
*elset, elset=stempeldown_rotatedF5
785, 266, 815, 504, 361, 793
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*elset, elset=sheetdown_rotatedF2
832,
*elset, elset=sheetdown_rotatedF5
529, 330, 227, 151, 385, 299
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*elset, elset=sheetup_rotatedF1
837,
*elset, elset=sheetup_rotatedF5
780, 561, 643, 108, 389, 155
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*elset, elset=sheetup_rotatedF6
667, 373,
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*elset, elset=matrizeup_rotatedF4
188, 835,
*elset, elset=matrizeup_rotatedF5
98, 294, 12, 104, 148, 89
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*transform, type=c, nset=nall
0.0, 0.0, 0.0,     0.0, 1.0, 0.0
*solid section, material=steel, elset=C3D8
*solid section, material=steel, elset=C3D6
*solid section, material=sheet, elset=Grsheet_Volumes
*material, name=steel
*elastic
210000.0, 0.3
*material, name=sheet
*elastic
5000.0, 0.3
*plastic
50.0, 0.0
100.0, 0.3
*surface, type=node, name=sheetup
sheetup
sheetup_rotated_1
*surface, type=element, name=sheetup
sheetup_rotatedF5, S5
sheetup_rotatedF6, S6
*surface, type=node, name=sheetdown
sheetdown
sheetdown_rotated_1
*surface, type=element, name=sheetdown
sheetdown_rotatedF2, S2
sheetdown_rotatedF5, S5
*surface, type=element, name=stempeldown
stempeldown_rotatedF2, S2
stempeldown_rotatedF5, S5
*surface, type=node, name=stempeldown
stempeldown
stempeldown_rotated_1
*surface, type=element, name=matrizeup
matrizeup_rotatedF4, S4
matrizeup_rotatedF5, S5
*surface, type=node, name=matrizeup
matrizeup_rotated_1
*Contact Pair, interaction=Kontakt,TYPE=NODE TO SURFACE
sheetup, stempeldown
*Contact Pair, interaction=Kontakt,TYPE=NODE TO SURFACE
sheetdown, matrizeup
*Surface Interaction, name=Kontakt
*Surface Behavior, pressure-overclosure=linear
5000.0, 1.0
*friction
0.2,0.001
*boundary
nall,2,2
matrizeright, 1,1
matrizeright, 3,3
matrizeright_rotated_1, 1,1
matrizeright_rotated_1, 3,3
sheetright,1,1
sheetright,3,3
sheetright_rotated_1,1,1
sheetright_rotated_1,3,3
matrizedown, 1,1
matrizedown, 3,3
matrizedown_rotated_1, 1,1
matrizedown_rotated_1, 3,3
*amplitude,name=a1
0.,0.,1.,1.
*step,nlgeom,inc=99999
*static
0.001,0.001, 0.0000001, 0.01
*boundary,amplitude=a1
stempelup, 3,3, -10.0
stempelup_rotated_1, 3,3, -10.0
stempelleft, 3,3, -10.0
sheetleft, 3,3, -10.0
*contact print
cdis,cstr
*endstep
