**
**   Structure: beam supported at its ends.
**   Test objective: section forces.
**
*NODE, NSET=Nall
       1,  0.00000e+00,  0.00000e+00,  0.00000e+00
       2,  1.00000e-01,  0.00000e+00,  0.00000e+00
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*ELEMENT, TYPE=B32, ELSET=Eall
     1,      1,      3,      2
     2,      2,      5,      4
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*BOUNDARY
1,1,3
40,2,3
1,4,4
40,4,4
*MATERIAL,NAME=EL
*ELASTIC
210000.,.3
*BEAM SECTION,ELSET=Eall,MATERIAL=EL,SECTION=RECT
0.05, 0.08
0.d0,1.d0,0.d0
*STEP,NLGEOM
*STATIC
*CLOAD
20,3,0.01
*NODE PRINT,NSET=NALL
U
*EL PRINT,ELSET=EALL
S
*NODE FILE,OUTPUT=2D
U
*EL FILE,SECTION FORCES
S
*END STEP
