**
**   Structure: one beam consisting of two parts
**              glued together with MPC's
**   Test objective: submodel technique.
**
*NODE, NSET=Nall
      38,1.000000000000e+00,0.000000000000e+00,3.000000000000e+00
      39,1.000000000000e+00,0.000000000000e+00,3.500000000000e+00
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*ELEMENT, TYPE=C3D20, ELSET=Eall
    14,   113,    38,   142,   234,   117,    40,   146,   240,   114,   141,
         235,   232,   118,   145,   241,   238,   115,    39,   144,   237
    18,   297,   259,   313,   362,   301,   261,   317,   368,   298,   312,
         363,   360,   302,   316,   369,   366,   299,   260,   315,   365
** Names based on d1
*NSET,NSET=Nd1
38,
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*ELSET,ELSET=Ed1
14,
** Names based on d2
*NSET,NSET=Nd2
259,
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*ELSET,ELSET=Ed2
18,
*SUBMODEL,TYPE=NODE,INPUT=twobeam.frd,GLOBAL ELSET=Ed1
Nd1
*SUBMODEL,TYPE=NODE,INPUT=twobeam.frd,GLOBAL ELSET=Ed2
Nd2
*MATERIAL,NAME=EL
*ELASTIC
210000.,.3
*EXPANSION
10.E-6
*SOLID SECTION,ELSET=Eall,MATERIAL=EL
*INITIAL CONDITIONS,TYPE=TEMPERATURE
Nall,300.
*STEP,NLGEOM
*STATIC
.5,1.
*TEMPERATURE,SUBMODEL,STEP=1
Nd1
Nd2
*BOUNDARY,SUBMODEL,STEP=1
Nd1,1,3
Nd2,1,3
*NODE FILE
U,NT
*EL FILE
S
*END STEP
