# 'map' <slave-set> <master-set> ['surf' 'ds'<nr> ]|['volu' 'ds'<nr>
# ]|[ 'x'|'y'|'z'|'rx'|'ry'|'rz' 'ds'<nr> ]
#
read ../turbine/latim.fbd
move all rot x -.1
mesh all
seta slave f all
comp slave do
seto master
# the result file ../therm/latimtrans.frd must be created before
read ../therm/latimtrans.frd add
setc
map  slave master volu ds
send slave abq ds
ds 1 e 1
plot fv slave
