** Bolt Pretension
**   Structure: bolt-like structure.
**   Test objective: pre-tension force.
**
*NODE, NSET=Nall
       1,2.500000000000e-01,3.000000000000e-01,0.000000000000e+00
       2,2.500000000000e-01,0.000000000000e+00,0.000000000000e+00
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*ELEMENT, TYPE=C3D20R, ELSET=Eall
     1,     1,     2,     3,     4,     5,     6,     7,     8,     9,    10,
          11,    12,    17,    18,    19,    20,    13,    14,    15,    16
     2,    21,    22,    23,    24,     1,     2,     3,     4,    25,    26,
          27,    28,     9,    10,    11,    12,    29,    30,    31,    32
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*NSET,NSET=Nfixx
29,
30,
31,
32,
150,
151,
152,
153,
*BOUNDARY
Nfixx,1,1
30,2,3
31,2,2
*MATERIAL,NAME=EL
*ELASTIC
210000.,.3
*EXPANSION
0.
*SOLID SECTION,ELSET=Eall,MATERIAL=EL
*SURFACE,NAME=SURF1
7,S2
*PRE-TENSION SECTION,SURFACE=SURF1,NODE=161
1.,0.,0.
*INITIAL CONDITIONS,TYPE=TEMPERATURE
Nall,273.
*STEP
*STATIC
*TEMPERATURE
Nall,473.
*CLOAD
161,1,-10.
*NODE PRINT,NSET=Nall
RF
*EL PRINT,ELSET=Eall
S
*NODE FILE
NT
*EL FILE
S
*NODE FILE
U
*END STEP
